*Heading
** Job name: TestModel Model name: TestModel
** Generated by: Abaqus/CAE 2020
*Preprint, echo=NO, model=NO, history=NO, contact=NO
**
** PARTS
**
*Part, name=PART-1
*Node
      1,           0.,           5.
      2,         -30.,           0.
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*Element, type=CPE3
1,  34,   2,  35
2, 153,  21,  22
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*Element, type=CPE4
 4, 148,   6,   7, 167
 5,  36,  33,  34,  35
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*Nset, nset=_PICKEDSET6, internal
   1,   2,   4,   6,   7,   8
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*Elset, elset=_PICKEDSET6, internal, generate
  88,  334,    1
*Nset, nset=_PICKEDSET7, internal
   1,   2,   3,   4,   5,   6
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*Elset, elset=_PICKEDSET7, internal
   1,   2,   3,   4,   5,   6
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** Section: Section-1-_PICKEDSET7
*Solid Section, elset=_PICKEDSET7, material=MATERIAL-2
,
** Section: Section-2-_PICKEDSET6
*Solid Section, elset=_PICKEDSET6, material=MATERIAL-1
,
*End Part
**
**
** ASSEMBLY
**
*Assembly, name=Assembly
**
*Instance, name=PART-1-1, part=PART-1
*End Instance
**
*Instance, name=PART-1-2, part=PART-1
          0.,           5.,           0.
          0.,           5.,           0.,           0.,           5.,           1.,         180.
*End Instance
**
*Nset, nset=ALL, instance=PART-1-1, generate
   1,  558,    1
*Nset, nset=ALL, instance=PART-1-2, generate
   1,  558,    1
*Elset, elset=ALL, instance=PART-1-1, generate
   1,  515,    1
*Elset, elset=ALL, instance=PART-1-2, generate
   1,  515,    1
*Nset, nset=SET-1, instance=PART-1-1
   1,   2,   4,   6,   7,   8
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*Elset, elset=SET-1, instance=PART-1-1, generate
  88,  334,    1
*Nset, nset=_PICKEDSET10, internal, instance=PART-1-2
   2,   5, 129, 130, 131, 132
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*Elset, elset=_PICKEDSET10, internal, instance=PART-1-2
 337, 348, 350, 354, 356, 361
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*Nset, nset=_PICKEDSET11, internal, instance=PART-1-1
   2,   5, 129, 130, 131, 132
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*Elset, elset=_PICKEDSET11, internal, instance=PART-1-1
 337, 348, 350, 354, 356, 361
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*Elset, elset=__PICKEDSURF6_S1, internal, instance=PART-1-1
 49,
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*Elset, elset=__PICKEDSURF6_S4_1, internal, instance=PART-1-1
 32, 50, 52
*Elset, elset=__PICKEDSURF6_S3_1, internal, instance=PART-1-1
 33,
*Elset, elset=__PICKEDSURF6_S1_1, internal, instance=PART-1-1
 49,
*Surface, type=ELEMENT, name=_PICKEDSURF6, internal
__PICKEDSURF6_S4_1, S4
__PICKEDSURF6_S3_1, S3
__PICKEDSURF6_S1_1, S1
*Elset, elset=__PICKEDSURF7_S4_1, internal, instance=PART-1-2
 32, 50, 52
*Elset, elset=__PICKEDSURF7_S3_1, internal, instance=PART-1-2
 33,
*Elset, elset=__PICKEDSURF7_S1_1, internal, instance=PART-1-2
 49,
*Surface, type=ELEMENT, name=_PICKEDSURF7, internal
__PICKEDSURF7_S4_1, S4
__PICKEDSURF7_S3_1, S3
__PICKEDSURF7_S1_1, S1
** Constraint: CONSTRAINT-1-1
*Tie, name=CONSTRAINT-1-1, adjust=yes
_PICKEDSURF7, _PICKEDSURF6
*End Assembly
**
** MATERIALS
**
*Material, name=MATERIAL-1
*Elastic
1000., 0.3
*Material, name=MATERIAL-2
*Elastic
2000., 0.3
** ----------------------------------------------------------------
**
** STEP: Step-1
**
*Step, name=Step-1, nlgeom=YES
*Static
1., 1., 1e-05, 1.
**
** BOUNDARY CONDITIONS
**
** Name: Disp-BC-1 Type: Symmetry/Antisymmetry/Encastre
*Boundary
_PICKEDSET10, PINNED
** Name: Disp-BC-2 Type: Displacement/Rotation
*Boundary
_PICKEDSET11, 1, 1, -1.
** Name: Disp-BC-3 Type: Displacement/Rotation
*Boundary
_PICKEDSET11, 2, 2
** Name: Disp-BC-4 Type: Displacement/Rotation
*Boundary
_PICKEDSET11, 6, 6
**
** OUTPUT REQUESTS
**
*Restart, write, frequency=0
**
** FIELD OUTPUT: F-Output-1
**
*Output, field
*Element Output, directions=YES
ENER,
**
** FIELD OUTPUT: F-Output-2
**
*Output, field, variable=PRESELECT
**
** HISTORY OUTPUT: H-Output-1
**
*Output, history, variable=PRESELECT
*End Step
** ----------------------------------------------------------------
**
** STEP: Step-2
**
*Step, name=Step-2, nlgeom=YES
*Static
1., 1., 1e-05, 1.
**
** BOUNDARY CONDITIONS
**
** Name: Disp-BC-2 Type: Displacement/Rotation
*Boundary
_PICKEDSET11, 1, 1, -2.
**
** OUTPUT REQUESTS
**
*Restart, write, frequency=0
**
** FIELD OUTPUT: F-Output-1
**
*Output, field
*Element Output, directions=YES
ENER,
**
** FIELD OUTPUT: F-Output-2
**
*Output, field, variable=PRESELECT
**
** HISTORY OUTPUT: H-Output-1
**
*Output, history, variable=PRESELECT
*End Step
