*Heading
** Job name: Job-1 Model name: Model-1
** Generated by: Abaqus/CAE 2020
*Preprint, echo=NO, model=NO, history=NO, contact=NO
**
** PARTS
**
*Part, name=Part-1
*Node
      1,           0.,           5.
      2,         -30.,           0.
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*Element, type=CPE3
1,  34,   2,  35
2, 153,  21,  22
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*Element, type=CPE4
 4, 148,   6,   7, 167
 5,  36,  33,  34,  35
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*Nset, nset=_PickedSet6, internal
   1,   2,   4,   6,   7,   8
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*Elset, elset=_PickedSet6, internal, generate
  88,  334,    1
*Nset, nset=_PickedSet7, internal
   1,   2,   3,   4,   5,   6
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*Elset, elset=_PickedSet7, internal
   1,   2,   3,   4,   5,   6
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** Section: Section-2
*Solid Section, elset=_PickedSet7, material=Material-2
,
** Section: Section-1
*Solid Section, elset=_PickedSet6, material=Material-1
,
*End Part
**
**
** ASSEMBLY
**
*Assembly, name=Assembly
**
*Instance, name=Part-1-1, part=Part-1
*End Instance
**
*Instance, name=Part-1-2, part=Part-1
          0.,           5.,           0.
          0.,           5.,           0.,           0.,           5.,           1.,         180.
*End Instance
**
*Nset, nset=Set-1, instance=Part-1-1
   1,   2,   4,   6,   7,   8
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*Elset, elset=Set-1, instance=Part-1-1, generate
  88,  334,    1
*Nset, nset=all, instance=Part-1-1, generate
   1,  558,    1
*Nset, nset=all, instance=Part-1-2, generate
   1,  558,    1
*Elset, elset=all, instance=Part-1-1, generate
   1,  515,    1
*Elset, elset=all, instance=Part-1-2, generate
   1,  515,    1
*Nset, nset=_PickedSet10, internal, instance=Part-1-2
   2,   5, 129, 130, 131, 132
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*Elset, elset=_PickedSet10, internal, instance=Part-1-2
 337, 348, 350, 354, 356, 361
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*Nset, nset=_PickedSet11, internal, instance=Part-1-1
   2,   5, 129, 130, 131, 132
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*Elset, elset=_PickedSet11, internal, instance=Part-1-1
 337, 348, 350, 354, 356, 361
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*Elset, elset=__PickedSurf6_S4, internal, instance=Part-1-1
 32, 50, 52
*Elset, elset=__PickedSurf6_S3, internal, instance=Part-1-1
 33,
*Elset, elset=__PickedSurf6_S1, internal, instance=Part-1-1
 49,
*Surface, type=ELEMENT, name=_PickedSurf6, internal
__PickedSurf6_S4, S4
__PickedSurf6_S3, S3
__PickedSurf6_S1, S1
*Elset, elset=__PickedSurf7_S4, internal, instance=Part-1-2
 32, 50, 52
*Elset, elset=__PickedSurf7_S3, internal, instance=Part-1-2
 33,
*Elset, elset=__PickedSurf7_S1, internal, instance=Part-1-2
 49,
*Surface, type=ELEMENT, name=_PickedSurf7, internal
__PickedSurf7_S4, S4
__PickedSurf7_S3, S3
__PickedSurf7_S1, S1
** Constraint: Constraint-1
*Tie, name=Constraint-1, adjust=yes
_PickedSurf7, _PickedSurf6
*End Assembly
**
** MATERIALS
**
*Material, name=Material-1
*Elastic
1000., 0.3
*Material, name=Material-2
*Elastic
2000., 0.3
** ----------------------------------------------------------------
**
** STEP: Step-1
**
*Step, name=Step-1, nlgeom=NO
*Static
1., 1., 1e-05, 1.
**
** BOUNDARY CONDITIONS
**
** Name: BC-1 Type: Symmetry/Antisymmetry/Encastre
*Boundary
_PickedSet10, PINNED
** Name: BC-2 Type: Displacement/Rotation
*Boundary
_PickedSet11, 1, 1, -1.
_PickedSet11, 2, 2
_PickedSet11, 6, 6
**
** OUTPUT REQUESTS
**
*Restart, write, frequency=0
**
** FIELD OUTPUT: F-Output-2
**
*Output, field
*Element Output, directions=YES
ENER,
**
** FIELD OUTPUT: F-Output-1
**
*Output, field, variable=PRESELECT
**
** HISTORY OUTPUT: H-Output-1
**
*Output, history, variable=PRESELECT
*End Step
